// SBML level 3 version 1

model BothPresyn90_noGABA_STP()
  // Compartment
  // model units - substance: substance, time: time, volume: volume, area: area, length: length, extent: substance

  // Compartments:
  compartment GABA_531_0_ = 2.627667e-16 volume;
  compartment glu_533_0_ = 2.627667e-16 volume;

  // Species:
  species Ca_473_0_ in GABA_531_0_ = 8.000127e-5;
  species $Ca_ext_475_0_ in GABA_531_0_ = 8.000127e-5;
  species $vesicle_pool_477_0_ in GABA_531_0_ = 0.003169859;
  species $Docked_479_0_ in GABA_531_0_ = 0.0005;
  species GABA_481_0_ in GABA_531_0_ = 0;
  // Compartment
  species Ca_491_0_ in glu_533_0_ = 8.000127e-5;
  species $Ca_ext_493_0_ in glu_533_0_ = 8.000127e-5;
  species RR_pool_495_0_ in glu_533_0_ = 0.0003;
  species $vesicle_pool_497_0_ in glu_533_0_ = 0.000872003;
  species glu_499_0_ in glu_533_0_ = 0;
  species Docked_501_0_ in glu_533_0_ = 0;
  species Ca_RR_503_0_ in glu_533_0_ = 0;
  species Buffer_505_0_ in glu_533_0_ = 0.004095268;
  species Ca4_dot_Buffer_507_0_ in glu_533_0_ = 0; Ca4_dot_Buffer_507_0_ is "Ca4.Buffer";

  // Reactions:
  // GABA_531_0_ * remove_Ca_483_0__Kf * Ca_473_0_^2-GABA_531_0_ * remove_Ca_483_0__Kb * Ca_ext_475_0_^2
  remove_Ca_483_0_: 2 Ca_473_0_ -> 2 $Ca_ext_475_0_; GABA_531_0_*remove_Ca_483_0__Kf*Ca_473_0_^2 - GABA_531_0_*remove_Ca_483_0__Kb*Ca_ext_475_0_^2;
    remove_Ca_483_0__Kf = 21238.3786 litre_per_mmole_per_second; remove_Ca_483_0__Kb = 6946.342 litre_per_mmole_per_second;
  // GABA_531_0_ * remove_485_0__Kf * GABA_481_0_
  remove_485_0_: GABA_481_0_ => 2 Ca_473_0_ + $vesicle_pool_477_0_; GABA_531_0_*remove_485_0__Kf*GABA_481_0_;
    remove_485_0__Kf = 38544 per_second;
  // GABA_531_0_ * vesicle_release_487_0__Kf * Ca_473_0_^2*Docked_479_0_
  // High cooperativity, 4 or higher. Several refs: McDargh and O-Shaughnessy, BioRxiv 2021 Voleti, Jaczynska, Rizo, eLife 2020 Chen.... Scheller, Cell 1999
  vesicle_release_487_0_: 2 Ca_473_0_ + $Docked_479_0_ => GABA_481_0_; GABA_531_0_*vesicle_release_487_0__Kf*Ca_473_0_^2*Docked_479_0_;
    vesicle_release_487_0__Kf = 522164.2 sq_litre_per_mmole_sq_per_second;
  // glu_533_0_ * remove_Ca_509_0__Kf * Ca_491_0_^2-glu_533_0_ * remove_Ca_509_0__Kb * Ca_ext_493_0_^2
  remove_Ca_509_0_: 2 Ca_491_0_ -> 2 $Ca_ext_493_0_; glu_533_0_*remove_Ca_509_0__Kf*Ca_491_0_^2 - glu_533_0_*remove_Ca_509_0__Kb*Ca_ext_493_0_^2;
    remove_Ca_509_0__Kf = 47118.2676 litre_per_mmole_per_second; remove_Ca_509_0__Kb = 15888.9748 litre_per_mmole_per_second;
  // glu_533_0_ * remove_511_0__Kf * glu_499_0_
  remove_511_0_: glu_499_0_ => 2 Ca_491_0_ + $vesicle_pool_497_0_; glu_533_0_*remove_511_0__Kf*glu_499_0_;
    remove_511_0__Kf = 74957 per_second;
  // glu_533_0_ * replenish_vesicle_513_0__Kf * vesicle_pool_497_0_-glu_533_0_ * replenish_vesicle_513_0__Kb * RR_pool_495_0_
  replenish_vesicle_513_0_: $vesicle_pool_497_0_ -> RR_pool_495_0_; glu_533_0_*replenish_vesicle_513_0__Kf*vesicle_pool_497_0_ - glu_533_0_*replenish_vesicle_513_0__Kb*RR_pool_495_0_;
    replenish_vesicle_513_0__Kf = 2.6147 per_second; replenish_vesicle_513_0__Kb = 2.6147 per_second;
  // glu_533_0_ * vesicle_release_515_0__Kf * Ca_491_0_^2*Docked_501_0_
  // High cooperativity, 4 or higher. Several refs: McDargh and O-Shaughnessy, BioRxiv 2021 Voleti, Jaczynska, Rizo, eLife 2020 Chen.... Scheller, Cell 1999
  vesicle_release_515_0_: 2 Ca_491_0_ + Docked_501_0_ => glu_499_0_; glu_533_0_*vesicle_release_515_0__Kf*Ca_491_0_^2*Docked_501_0_;
    vesicle_release_515_0__Kf = 627407.3 sq_litre_per_mmole_sq_per_second;
  // glu_533_0_ * Ca_bind_RR_517_0__Kf * Ca_491_0_^2*RR_pool_495_0_-glu_533_0_ * Ca_bind_RR_517_0__Kb * Ca_RR_503_0_
  Ca_bind_RR_517_0_: 2 Ca_491_0_ + RR_pool_495_0_ -> Ca_RR_503_0_; glu_533_0_*Ca_bind_RR_517_0__Kf*Ca_491_0_^2*RR_pool_495_0_ - glu_533_0_*Ca_bind_RR_517_0__Kb*Ca_RR_503_0_;
    Ca_bind_RR_517_0__Kf = 993919 sq_litre_per_mmole_sq_per_second; Ca_bind_RR_517_0__Kb = 0.17877 per_second;
  // glu_533_0_ * docking_519_0__Kf * Ca_RR_503_0_
  docking_519_0_: Ca_RR_503_0_ => 2 Ca_491_0_ + Docked_501_0_; glu_533_0_*docking_519_0__Kf*Ca_RR_503_0_;
    docking_519_0__Kf = 1986.1 per_second;
  // glu_533_0_ * undocking_521_0__Kf * Docked_501_0_
  undocking_521_0_: Docked_501_0_ => RR_pool_495_0_; glu_533_0_*undocking_521_0__Kf*Docked_501_0_;
    undocking_521_0__Kf = 127.73 per_second;
  // glu_533_0_ * Ca_bind_buffer_523_0__Kf * Ca_491_0_^4*Buffer_505_0_-glu_533_0_ * Ca_bind_buffer_523_0__Kb * Ca4_dot_Buffer_507_0_
  Ca_bind_buffer_523_0_: 4 Ca_491_0_ + Buffer_505_0_ -> Ca4_dot_Buffer_507_0_; glu_533_0_*Ca_bind_buffer_523_0__Kf*Ca_491_0_^4*Buffer_505_0_ - glu_533_0_*Ca_bind_buffer_523_0__Kb*Ca4_dot_Buffer_507_0_;
    Ca_bind_buffer_523_0__Kf = 1.014826e13 litre_per_mmole_4_per_second; Ca_bind_buffer_523_0__Kb = 1000 per_second;

  // Unit definitions:
  unit volume = litre;
  unit substance = 1e-3 mole;
  unit length = metre;
  unit area = metre^2;
  unit time = second;
  unit litre_per_mmole_per_second = litre / (1e-3 mole * second);
  unit per_second = 1 / second;
  unit sq_litre_per_mmole_sq_per_second = litre^2 / ((1e-3 mole)^2 * second);
  unit litre_per_mmole_4_per_second = litre^4 / ((1e-3 mole)^4 * second);
end
