// SBML level 3 version 1

model BothPresyn90_noGlu_STP()
  // Compartment
  // model units - substance: substance, time: time, volume: volume, area: area, length: length, extent: substance

  // Compartments:
  compartment GABA_531_0_ = 2.627667e-16 volume;
  compartment glu_533_0_ = 2.627667e-16 volume;

  // Species:
  species Ca_473_0_ in GABA_531_0_ = 8.000127e-5;
  species $Ca_ext_475_0_ in GABA_531_0_ = 8.000127e-5;
  species RR_pool_477_0_ in GABA_531_0_ = 0.003;
  species $vesicle_pool_479_0_ in GABA_531_0_ = 0.003169859;
  species Docked_481_0_ in GABA_531_0_ = 0;
  species Ca_RR_483_0_ in GABA_531_0_ = 0;
  species GABA_485_0_ in GABA_531_0_ = 0;
  species Buffer_487_0_ in GABA_531_0_ = 0.003472663;
  species Ca4_dot_Buffer_489_0_ in GABA_531_0_ = 0; Ca4_dot_Buffer_489_0_ is "Ca4.Buffer";
  // Compartment
  species Ca_509_0_ in glu_533_0_ = 8.000127e-5;
  species $Ca_ext_511_0_ in glu_533_0_ = 8.000127e-5;
  species $vesicle_pool_513_0_ in glu_533_0_ = 0.000872003;
  species glu_515_0_ in glu_533_0_ = 0;
  species $Docked_517_0_ in glu_533_0_ = 0.0002250032;

  // Reactions:
  // GABA_531_0_ * remove_Ca_491_0__Kf * Ca_473_0_^2-GABA_531_0_ * remove_Ca_491_0__Kb * Ca_ext_475_0_^2
  remove_Ca_491_0_: 2 Ca_473_0_ -> 2 $Ca_ext_475_0_; GABA_531_0_*remove_Ca_491_0__Kf*Ca_473_0_^2 - GABA_531_0_*remove_Ca_491_0__Kb*Ca_ext_475_0_^2;
    remove_Ca_491_0__Kf = 21238.3786 litre_per_mmole_per_second; remove_Ca_491_0__Kb = 6946.342 litre_per_mmole_per_second;
  // GABA_531_0_ * remove_493_0__Kf * GABA_485_0_
  remove_493_0_: GABA_485_0_ => 2 Ca_473_0_ + $vesicle_pool_479_0_; GABA_531_0_*remove_493_0__Kf*GABA_485_0_;
    remove_493_0__Kf = 38544 per_second;
  // GABA_531_0_ * replenish_vesicle_495_0__Kf * vesicle_pool_479_0_-GABA_531_0_ * replenish_vesicle_495_0__Kb * RR_pool_477_0_
  replenish_vesicle_495_0_: $vesicle_pool_479_0_ -> RR_pool_477_0_; GABA_531_0_*replenish_vesicle_495_0__Kf*vesicle_pool_479_0_ - GABA_531_0_*replenish_vesicle_495_0__Kb*RR_pool_477_0_;
    replenish_vesicle_495_0__Kf = 2.6639 per_second; replenish_vesicle_495_0__Kb = 2.6639 per_second;
  // GABA_531_0_ * vesicle_release_497_0__Kf * Ca_473_0_^2*Docked_481_0_
  // High cooperativity, 4 or higher. Several refs: McDargh and O-Shaughnessy, BioRxiv 2021 Voleti, Jaczynska, Rizo, eLife 2020 Chen.... Scheller, Cell 1999
  vesicle_release_497_0_: 2 Ca_473_0_ + Docked_481_0_ => GABA_485_0_; GABA_531_0_*vesicle_release_497_0__Kf*Ca_473_0_^2*Docked_481_0_;
    vesicle_release_497_0__Kf = 522164.2 sq_litre_per_mmole_sq_per_second;
  // GABA_531_0_ * Ca_bind_RR_499_0__Kf * Ca_473_0_^2*RR_pool_477_0_-GABA_531_0_ * Ca_bind_RR_499_0__Kb * Ca_RR_483_0_
  Ca_bind_RR_499_0_: 2 Ca_473_0_ + RR_pool_477_0_ -> Ca_RR_483_0_; GABA_531_0_*Ca_bind_RR_499_0__Kf*Ca_473_0_^2*RR_pool_477_0_ - GABA_531_0_*Ca_bind_RR_499_0__Kb*Ca_RR_483_0_;
    Ca_bind_RR_499_0__Kf = 1.60169e7 sq_litre_per_mmole_sq_per_second; Ca_bind_RR_499_0__Kb = 3.349 per_second;
  // GABA_531_0_ * docking_501_0__Kf * Ca_RR_483_0_
  docking_501_0_: Ca_RR_483_0_ => 2 Ca_473_0_ + Docked_481_0_; GABA_531_0_*docking_501_0__Kf*Ca_RR_483_0_;
    docking_501_0__Kf = 341.59 per_second;
  // GABA_531_0_ * undocking_503_0__Kf * Docked_481_0_
  undocking_503_0_: Docked_481_0_ => RR_pool_477_0_; GABA_531_0_*undocking_503_0__Kf*Docked_481_0_;
    undocking_503_0__Kf = 335.88 per_second;
  // GABA_531_0_ * Ca_bind_buffer_505_0__Kf * Ca_473_0_^4*Buffer_487_0_-GABA_531_0_ * Ca_bind_buffer_505_0__Kb * Ca4_dot_Buffer_489_0_
  Ca_bind_buffer_505_0_: 4 Ca_473_0_ + Buffer_487_0_ -> Ca4_dot_Buffer_489_0_; GABA_531_0_*Ca_bind_buffer_505_0__Kf*Ca_473_0_^4*Buffer_487_0_ - GABA_531_0_*Ca_bind_buffer_505_0__Kb*Ca4_dot_Buffer_489_0_;
    Ca_bind_buffer_505_0__Kf = 4.059118e13 litre_per_mmole_4_per_second; Ca_bind_buffer_505_0__Kb = 1000 per_second;
  // glu_533_0_ * remove_Ca_519_0__Kf * Ca_509_0_^2-glu_533_0_ * remove_Ca_519_0__Kb * Ca_ext_511_0_^2
  remove_Ca_519_0_: 2 Ca_509_0_ -> 2 $Ca_ext_511_0_; glu_533_0_*remove_Ca_519_0__Kf*Ca_509_0_^2 - glu_533_0_*remove_Ca_519_0__Kb*Ca_ext_511_0_^2;
    remove_Ca_519_0__Kf = 47118.2676 litre_per_mmole_per_second; remove_Ca_519_0__Kb = 15888.9748 litre_per_mmole_per_second;
  // glu_533_0_ * remove_521_0__Kf * glu_515_0_
  remove_521_0_: glu_515_0_ => 2 Ca_509_0_ + $vesicle_pool_513_0_; glu_533_0_*remove_521_0__Kf*glu_515_0_;
    remove_521_0__Kf = 74957 per_second;
  // glu_533_0_ * vesicle_release_523_0__Kf * Ca_509_0_^2*Docked_517_0_
  // High cooperativity, 4 or higher. Several refs: McDargh and O-Shaughnessy, BioRxiv 2021 Voleti, Jaczynska, Rizo, eLife 2020 Chen.... Scheller, Cell 1999
  vesicle_release_523_0_: 2 Ca_509_0_ + $Docked_517_0_ => glu_515_0_; glu_533_0_*vesicle_release_523_0__Kf*Ca_509_0_^2*Docked_517_0_;
    vesicle_release_523_0__Kf = 627407.3 sq_litre_per_mmole_sq_per_second;

  // Unit definitions:
  unit volume = litre;
  unit substance = 1e-3 mole;
  unit length = metre;
  unit area = metre^2;
  unit time = second;
  unit litre_per_mmole_per_second = litre / (1e-3 mole * second);
  unit per_second = 1 / second;
  unit sq_litre_per_mmole_sq_per_second = litre^2 / ((1e-3 mole)^2 * second);
  unit litre_per_mmole_4_per_second = litre^4 / ((1e-3 mole)^4 * second);
end
