// SBML level 3 version 1

model BothPresyn90_noSTP()
  // Compartment
  // model units - substance: substance, time: time, volume: volume, area: area, length: length, extent: substance

  // Compartments:
  compartment GABA_515_0_ = 2.627667e-16 volume;
  compartment glu_517_0_ = 2.627667e-16 volume;

  // Species:
  species Ca_473_0_ in GABA_515_0_ = 8.000127e-5;
  species $Ca_ext_475_0_ in GABA_515_0_ = 8.000127e-5;
  species $vesicle_pool_477_0_ in GABA_515_0_ = 0.003169859;
  species $Docked_479_0_ in GABA_515_0_ = 0.0005;
  species GABA_481_0_ in GABA_515_0_ = 0;
  // Compartment
  species Ca_491_0_ in glu_517_0_ = 8.000127e-5;
  species $Ca_ext_493_0_ in glu_517_0_ = 8.000127e-5;
  species $vesicle_pool_495_0_ in glu_517_0_ = 0.000872003;
  species glu_497_0_ in glu_517_0_ = 0;
  species $Docked_499_0_ in glu_517_0_ = 0.0002250032;

  // Reactions:
  // GABA_515_0_ * remove_Ca_483_0__Kf * Ca_473_0_^2-GABA_515_0_ * remove_Ca_483_0__Kb * Ca_ext_475_0_^2
  remove_Ca_483_0_: 2 Ca_473_0_ -> 2 $Ca_ext_475_0_; GABA_515_0_*remove_Ca_483_0__Kf*Ca_473_0_^2 - GABA_515_0_*remove_Ca_483_0__Kb*Ca_ext_475_0_^2;
    remove_Ca_483_0__Kf = 21238.3786 litre_per_mmole_per_second; remove_Ca_483_0__Kb = 6946.342 litre_per_mmole_per_second;
  // GABA_515_0_ * remove_485_0__Kf * GABA_481_0_
  remove_485_0_: GABA_481_0_ => 2 Ca_473_0_ + $vesicle_pool_477_0_; GABA_515_0_*remove_485_0__Kf*GABA_481_0_;
    remove_485_0__Kf = 38544 per_second;
  // GABA_515_0_ * vesicle_release_487_0__Kf * Ca_473_0_^2*Docked_479_0_
  // High cooperativity, 4 or higher. Several refs: McDargh and O-Shaughnessy, BioRxiv 2021 Voleti, Jaczynska, Rizo, eLife 2020 Chen.... Scheller, Cell 1999
  vesicle_release_487_0_: 2 Ca_473_0_ + $Docked_479_0_ => GABA_481_0_; GABA_515_0_*vesicle_release_487_0__Kf*Ca_473_0_^2*Docked_479_0_;
    vesicle_release_487_0__Kf = 522164.2 sq_litre_per_mmole_sq_per_second;
  // glu_517_0_ * remove_Ca_501_0__Kf * Ca_491_0_^2-glu_517_0_ * remove_Ca_501_0__Kb * Ca_ext_493_0_^2
  remove_Ca_501_0_: 2 Ca_491_0_ -> 2 $Ca_ext_493_0_; glu_517_0_*remove_Ca_501_0__Kf*Ca_491_0_^2 - glu_517_0_*remove_Ca_501_0__Kb*Ca_ext_493_0_^2;
    remove_Ca_501_0__Kf = 47118.2676 litre_per_mmole_per_second; remove_Ca_501_0__Kb = 15888.9748 litre_per_mmole_per_second;
  // glu_517_0_ * remove_503_0__Kf * glu_497_0_
  remove_503_0_: glu_497_0_ => 2 Ca_491_0_ + $vesicle_pool_495_0_; glu_517_0_*remove_503_0__Kf*glu_497_0_;
    remove_503_0__Kf = 74957 per_second;
  // glu_517_0_ * vesicle_release_505_0__Kf * Ca_491_0_^2*Docked_499_0_
  // High cooperativity, 4 or higher. Several refs: McDargh and O-Shaughnessy, BioRxiv 2021 Voleti, Jaczynska, Rizo, eLife 2020 Chen.... Scheller, Cell 1999
  vesicle_release_505_0_: 2 Ca_491_0_ + $Docked_499_0_ => glu_497_0_; glu_517_0_*vesicle_release_505_0__Kf*Ca_491_0_^2*Docked_499_0_;
    vesicle_release_505_0__Kf = 627407.3 sq_litre_per_mmole_sq_per_second;

  // Unit definitions:
  unit volume = litre;
  unit substance = 1e-3 mole;
  unit length = metre;
  unit area = metre^2;
  unit time = second;
  unit litre_per_mmole_per_second = litre / (1e-3 mole * second);
  unit per_second = 1 / second;
  unit sq_litre_per_mmole_sq_per_second = litre^2 / ((1e-3 mole)^2 * second);
end
